<?xml version="1.0"?>

<!--
	Author: Slavutinsky Victor
-->

<!-- RD-0109 Main Engine -->

<rocket_engine name="RD-0109-Main">
<!--	<isp>               326 </isp> -->
	<isp>               330.0 </isp>
	<shr>              1.23 </shr>
	<max_pc>       86556.00 </max_pc>
	<variance>         0.10 </variance>
	<prop_eff>         0.67 </prop_eff>
	<maxthrottle>      1.00 </maxthrottle>
	<minthrottle>      0.00 </minthrottle>
	<sloxiflowmax>     20.06 </sloxiflowmax>
	<slfuelflowmax>    7.48  </slfuelflowmax>
</rocket_engine>
