<?xml version="1.0"?>

<!--
	Author: Slavutinsky Victor
-->

<!-- RD-108 Maneur Engine -->

<rocket_engine name="RD-108-Maneur">
	<isp>               313.3 </isp>
	<shr>              1.23 </shr>
	<max_pc>       86556.00 </max_pc>
	<variance>         0.1 </variance>
	<prop_eff>         0.67 </prop_eff>
	<maxthrottle>      1.00 </maxthrottle>
	<minthrottle>      0.00 </minthrottle>
	<sloxiflowmax>   18.84 </sloxiflowmax>
	<slfuelflowmax>   9.14 </slfuelflowmax>
</rocket_engine>
